// SBML level 3 version 2

model mix_of_E30VNPRL_E30VNPRL_gene_expression()
  // mix_of_E30VNPRL_E30VNPRL_gene_expression
  // model units - substance: substance, time: second, volume: volume, area: area, length: metre, extent: substance

  // Compartments:
  compartment contents = 1 volume;

  // Species:
  species RNAP in contents = 50/contents;
  species Ribo in contents = 30.00002/contents;
  species RecBCD in contents = 5.000003/contents;
  species RNase in contents = 100.0001/contents;
  species AGTP in contents = 3180048/contents;
  species CUTP in contents = 1908029/contents;
  species AA in contents = 3.180048e7/contents;
  species protein_tetR in contents = 0;
  species aTc in contents = 0;
  species protein_tetRdimer in contents = 0;
  species RNA_utr1_tetR in contents = 0; RNA_utr1_tetR is "RNA utr1--tetR";
  species Ribo_RNA_utr1_tetR in contents = 0; Ribo_RNA_utr1_tetR is "Ribo:RNA utr1--tetR";
  species DNA_psigX_utr1_tetR in contents = 0.5000003/contents; DNA_psigX_utr1_tetR is "DNA psigX--utr1--tetR";
  species RNAPSIGX in contents = 0;
  species RNAPSIGX_DNA_psigX_utr1_tetR in contents = 0; RNAPSIGX_DNA_psigX_utr1_tetR is "RNAPSIGX:DNA psigX--utr1--tetR";
  species AA_2AGTP_Ribo_RNA_utr1_tetR in contents = 0; AA_2AGTP_Ribo_RNA_utr1_tetR is "AA:2AGTP:Ribo:RNA utr1--tetR";
  species term_Ribo_RNA_utr1_tetR in contents = 0; term_Ribo_RNA_utr1_tetR is "term_Ribo:RNA utr1--tetR";
  species protein_deGFP_contents_19 in contents = 0;
  species protein_deGFP_contents_20 in contents = 0; protein_deGFP_contents_20 is "protein deGFP*";
  species RNA_utr1_deGFP in contents = 0; RNA_utr1_deGFP is "RNA utr1--deGFP";
  species Ribo_RNA_utr1_deGFP in contents = 0; Ribo_RNA_utr1_deGFP is "Ribo:RNA utr1--deGFP";
  species DNA_p28_ptet_utr1_deGFP in contents = 2.000001/contents; DNA_p28_ptet_utr1_deGFP is "DNA p28_ptet--utr1--deGFP";
  species RNAP28 in contents = 0;
  species RNAP28_DNA_p28_ptet_utr1_deGFP in contents = 0; RNAP28_DNA_p28_ptet_utr1_deGFP is "RNAP28:DNA p28_ptet--utr1--deGFP";
  species protein_sigma28 in contents = 0;
  species AA_2AGTP_Ribo_RNA_utr1_deGFP in contents = 0; AA_2AGTP_Ribo_RNA_utr1_deGFP is "AA:2AGTP:Ribo:RNA utr1--deGFP";
  species term_Ribo_RNA_utr1_deGFP in contents = 0; term_Ribo_RNA_utr1_deGFP is "term_Ribo:RNA utr1--deGFP";
  species _2_aTc_protein_tetRdimer in contents = 0; _2_aTc_protein_tetRdimer is "2 aTc:protein tetRdimer";
  species CUTP_AGTP_RNAPSIGX_DNA_psigX_utr1_tetR in contents = 0; CUTP_AGTP_RNAPSIGX_DNA_psigX_utr1_tetR is "CUTP:AGTP:RNAPSIGX:DNA psigX--utr1--tetR";
  species term_RNAPSIGX_DNA_psigX_utr1_tetR in contents = 0; term_RNAPSIGX_DNA_psigX_utr1_tetR is "term_RNAPSIGX:DNA psigX--utr1--tetR";
  species AGTP_RNAPSIGX_DNA_psigX_utr1_tetR in contents = 0; AGTP_RNAPSIGX_DNA_psigX_utr1_tetR is "AGTP:RNAPSIGX:DNA psigX--utr1--tetR";
  species CUTP_RNAPSIGX_DNA_psigX_utr1_tetR in contents = 0; CUTP_RNAPSIGX_DNA_psigX_utr1_tetR is "CUTP:RNAPSIGX:DNA psigX--utr1--tetR";
  species AA_Ribo_RNA_utr1_tetR in contents = 0; AA_Ribo_RNA_utr1_tetR is "AA:Ribo:RNA utr1--tetR";
  species RNA_utr1_tetR_RNase in contents = 0; RNA_utr1_tetR_RNase is "RNA utr1--tetR:RNase";
  species Ribo_RNA_utr1_tetR_RNase in contents = 0; Ribo_RNA_utr1_tetR_RNase is "Ribo:RNA utr1--tetR:RNase";
  species AA_2AGTP_Ribo_RNA_utr1_tetR_RNase in contents = 0; AA_2AGTP_Ribo_RNA_utr1_tetR_RNase is "AA:2AGTP:Ribo:RNA utr1--tetR:RNase";
  species term_Ribo_RNA_utr1_tetR_RNase in contents = 0; term_Ribo_RNA_utr1_tetR_RNase is "term_Ribo:RNA utr1--tetR:RNase";
  species AA_Ribo_RNA_utr1_tetR_RNase in contents = 0; AA_Ribo_RNA_utr1_tetR_RNase is "AA:Ribo:RNA utr1--tetR:RNase";
  species DNA_p28_ptet_utr1_deGFP_protein_tetRdimer in contents = 0; DNA_p28_ptet_utr1_deGFP_protein_tetRdimer is "DNA p28_ptet--utr1--deGFP:protein tetRdimer";
  species RNAP28_DNA_p28_ptet_utr1_deGFP_protein_tetRdimer in contents = 0; RNAP28_DNA_p28_ptet_utr1_deGFP_protein_tetRdimer is "RNAP28:DNA p28_ptet--utr1--deGFP:protein tetRdimer";
  species AA_Ribo_RNA_utr1_deGFP in contents = 0; AA_Ribo_RNA_utr1_deGFP is "AA:Ribo:RNA utr1--deGFP";
  species RNA_utr1_deGFP_RNase in contents = 0; RNA_utr1_deGFP_RNase is "RNA utr1--deGFP:RNase";
  species Ribo_RNA_utr1_deGFP_RNase in contents = 0; Ribo_RNA_utr1_deGFP_RNase is "Ribo:RNA utr1--deGFP:RNase";
  species AA_2AGTP_Ribo_RNA_utr1_deGFP_RNase in contents = 0; AA_2AGTP_Ribo_RNA_utr1_deGFP_RNase is "AA:2AGTP:Ribo:RNA utr1--deGFP:RNase";
  species term_Ribo_RNA_utr1_deGFP_RNase in contents = 0; term_Ribo_RNA_utr1_deGFP_RNase is "term_Ribo:RNA utr1--deGFP:RNase";
  species AA_Ribo_RNA_utr1_deGFP_RNase in contents = 0; AA_Ribo_RNA_utr1_deGFP_RNase is "AA:Ribo:RNA utr1--deGFP:RNase";
  species AGTP_USED in contents = 0;

  // Parameters:
  AGTPdeg_F = 0;

  // Reactions:
  reaction_50: RNAP + protein_sigma28 -> RNAP28; Sigma28_RNAP_F*RNAP*protein_sigma28 - Sigma28_RNAP_R*RNAP28;
    Sigma28_RNAP_F = 100; Sigma28_RNAP_R = 0.1;
  reaction_51: protein_tetRdimer + 2 aTc -> _2_aTc_protein_tetRdimer; TXTL_INDUCER_TETR_ATC_F*protein_tetRdimer*aTc^2 - TXTL_INDUCER_TETR_ATC_R*_2_aTc_protein_tetRdimer;
    TXTL_INDUCER_TETR_ATC_F = 1e-5; TXTL_INDUCER_TETR_ATC_R = 0.1;
  reaction_52: 2 protein_tetR -> protein_tetRdimer; reaction_52_kf*protein_tetR^2 - reaction_52_kr*protein_tetRdimer;
    reaction_52_kf = 1; reaction_52_kr = 1;
  reaction_53: RNA_utr1_tetR + Ribo -> Ribo_RNA_utr1_tetR; reaction_53_TXTL_UTR_UTR1_F*RNA_utr1_tetR*Ribo - reaction_53_TXTL_UTR_UTR1_R*Ribo_RNA_utr1_tetR;
    reaction_53_TXTL_UTR_UTR1_F = 0.2; reaction_53_TXTL_UTR_UTR1_R = 4;
  reaction_54: DNA_psigX_utr1_tetR + RNAPSIGX -> RNAPSIGX_DNA_psigX_utr1_tetR; TXTL_SIGX_RNAPbound_F*DNA_psigX_utr1_tetR*RNAPSIGX - TXTL_SIGX_RNAPbound_R*RNAPSIGX_DNA_psigX_utr1_tetR;
    TXTL_SIGX_RNAPbound_F = 10; TXTL_SIGX_RNAPbound_R = 0.1;
  reaction_55: CUTP_AGTP_RNAPSIGX_DNA_psigX_utr1_tetR => RNAPSIGX_DNA_psigX_utr1_tetR; TXTL_NTP_consumption*CUTP_AGTP_RNAPSIGX_DNA_psigX_utr1_tetR;
    TXTL_NTP_consumption = 0.7487705;
  reaction_56: term_RNAPSIGX_DNA_psigX_utr1_tetR => RNAPSIGX + DNA_psigX_utr1_tetR; TXTL_RNAPBOUND_TERMINATION_RATE*term_RNAPSIGX_DNA_psigX_utr1_tetR;
    TXTL_RNAPBOUND_TERMINATION_RATE = 0.05;
  reaction_57: RNAPSIGX_DNA_psigX_utr1_tetR + AGTP -> AGTP_RNAPSIGX_DNA_psigX_utr1_tetR; reaction_57_TXTL_NTP_RNAP_F*RNAPSIGX_DNA_psigX_utr1_tetR*AGTP - reaction_57_TXTL_NTP_RNAP_R*AGTP_RNAPSIGX_DNA_psigX_utr1_tetR;
    reaction_57_TXTL_NTP_RNAP_F = 1000; reaction_57_TXTL_NTP_RNAP_R = 120000000;
  reaction_58: RNAPSIGX_DNA_psigX_utr1_tetR + CUTP -> CUTP_RNAPSIGX_DNA_psigX_utr1_tetR; reaction_58_TXTL_NTP_RNAP_F*RNAPSIGX_DNA_psigX_utr1_tetR*CUTP - reaction_58_TXTL_NTP_RNAP_R*CUTP_RNAPSIGX_DNA_psigX_utr1_tetR;
    reaction_58_TXTL_NTP_RNAP_F = 1000; reaction_58_TXTL_NTP_RNAP_R = 120000000;
  reaction_59: AGTP_RNAPSIGX_DNA_psigX_utr1_tetR + CUTP -> CUTP_AGTP_RNAPSIGX_DNA_psigX_utr1_tetR; reaction_59_TXTL_NTP_RNAP_F*AGTP_RNAPSIGX_DNA_psigX_utr1_tetR*CUTP - reaction_59_TXTL_NTP_RNAP_R*CUTP_AGTP_RNAPSIGX_DNA_psigX_utr1_tetR;
    reaction_59_TXTL_NTP_RNAP_F = 1; reaction_59_TXTL_NTP_RNAP_R = 120000;
  reaction_60: CUTP_RNAPSIGX_DNA_psigX_utr1_tetR + AGTP -> CUTP_AGTP_RNAPSIGX_DNA_psigX_utr1_tetR; reaction_60_TXTL_NTP_RNAP_F*CUTP_RNAPSIGX_DNA_psigX_utr1_tetR*AGTP - reaction_60_TXTL_NTP_RNAP_R*CUTP_AGTP_RNAPSIGX_DNA_psigX_utr1_tetR;
    reaction_60_TXTL_NTP_RNAP_F = 1; reaction_60_TXTL_NTP_RNAP_R = 120000;
  reaction_61: CUTP_AGTP_RNAPSIGX_DNA_psigX_utr1_tetR => term_RNAPSIGX_DNA_psigX_utr1_tetR + RNA_utr1_tetR; TXTL_transcription_rate1*CUTP_AGTP_RNAPSIGX_DNA_psigX_utr1_tetR;
    TXTL_transcription_rate1 = 0.001229508;
  reaction_62: Ribo_RNA_utr1_tetR + AA -> AA_Ribo_RNA_utr1_tetR; reaction_62_TL_AA_F*Ribo_RNA_utr1_tetR*AA - reaction_62_TL_AA_R*AA_Ribo_RNA_utr1_tetR;
    reaction_62_TL_AA_F = 300; reaction_62_TL_AA_R = 0.1;
  reaction_63: AA_Ribo_RNA_utr1_tetR + 2 AGTP -> AA_2AGTP_Ribo_RNA_utr1_tetR; reaction_63_TL_AGTP_F*AA_Ribo_RNA_utr1_tetR*AGTP^2 - reaction_63_TL_AGTP_R*AA_2AGTP_Ribo_RNA_utr1_tetR;
    reaction_63_TL_AGTP_F = 30; reaction_63_TL_AGTP_R = 10;
  reaction_64: AA_2AGTP_Ribo_RNA_utr1_tetR => term_Ribo_RNA_utr1_tetR; reaction_64_TXTL_TL_AA_consumption*AA_2AGTP_Ribo_RNA_utr1_tetR;
    reaction_64_TXTL_TL_AA_consumption = 0.03;
  reaction_65: AA_2AGTP_Ribo_RNA_utr1_tetR => term_Ribo_RNA_utr1_tetR + protein_tetR; reaction_65_TXTL_TL_rate*AA_2AGTP_Ribo_RNA_utr1_tetR;
    reaction_65_TXTL_TL_rate = 0.01;
  reaction_66: term_Ribo_RNA_utr1_tetR => RNA_utr1_tetR + Ribo; reaction_66_TXTL_RIBOBOUND_TERMINATION_RATE*term_Ribo_RNA_utr1_tetR;
    reaction_66_TXTL_RIBOBOUND_TERMINATION_RATE = 50;
  reaction_67: RNA_utr1_tetR + RNase -> RNA_utr1_tetR_RNase; reaction_67_TXTL_RNAdeg_F*RNA_utr1_tetR*RNase - reaction_67_TXTL_RNAdeg_R*RNA_utr1_tetR_RNase;
    reaction_67_TXTL_RNAdeg_F = 10; reaction_67_TXTL_RNAdeg_R = 2000;
  reaction_68: RNA_utr1_tetR_RNase => RNase; reaction_68_TXTL_RNAdeg_F*RNA_utr1_tetR_RNase;
    reaction_68_TXTL_RNAdeg_F = 0.002777778;
  reaction_69: Ribo_RNA_utr1_tetR + RNase -> Ribo_RNA_utr1_tetR_RNase; reaction_69_TXTL_RNAdeg_F*Ribo_RNA_utr1_tetR*RNase - reaction_69_TXTL_RNAdeg_R*Ribo_RNA_utr1_tetR_RNase;
    reaction_69_TXTL_RNAdeg_F = 10; reaction_69_TXTL_RNAdeg_R = 2000;
  reaction_70: Ribo_RNA_utr1_tetR_RNase => RNase + Ribo; reaction_70_TXTL_RNAdeg_F*Ribo_RNA_utr1_tetR_RNase;
    reaction_70_TXTL_RNAdeg_F = 0.002777778;
  reaction_71: AA_2AGTP_Ribo_RNA_utr1_tetR + RNase -> AA_2AGTP_Ribo_RNA_utr1_tetR_RNase; reaction_71_TXTL_RNAdeg_F*AA_2AGTP_Ribo_RNA_utr1_tetR*RNase - reaction_71_TXTL_RNAdeg_R*AA_2AGTP_Ribo_RNA_utr1_tetR_RNase;
    reaction_71_TXTL_RNAdeg_F = 10; reaction_71_TXTL_RNAdeg_R = 2000;
  reaction_72: AA_2AGTP_Ribo_RNA_utr1_tetR_RNase => RNase + AA + 2 AGTP + Ribo; reaction_72_TXTL_RNAdeg_F*AA_2AGTP_Ribo_RNA_utr1_tetR_RNase;
    reaction_72_TXTL_RNAdeg_F = 0.002777778;
  reaction_73: term_Ribo_RNA_utr1_tetR + RNase -> term_Ribo_RNA_utr1_tetR_RNase; reaction_73_TXTL_RNAdeg_F*term_Ribo_RNA_utr1_tetR*RNase - reaction_73_TXTL_RNAdeg_R*term_Ribo_RNA_utr1_tetR_RNase;
    reaction_73_TXTL_RNAdeg_F = 10; reaction_73_TXTL_RNAdeg_R = 2000;
  reaction_74: term_Ribo_RNA_utr1_tetR_RNase => RNase + Ribo; reaction_74_TXTL_RNAdeg_F*term_Ribo_RNA_utr1_tetR_RNase;
    reaction_74_TXTL_RNAdeg_F = 0.002777778;
  reaction_75: AA_Ribo_RNA_utr1_tetR + RNase -> AA_Ribo_RNA_utr1_tetR_RNase; reaction_75_TXTL_RNAdeg_F*AA_Ribo_RNA_utr1_tetR*RNase - reaction_75_TXTL_RNAdeg_R*AA_Ribo_RNA_utr1_tetR_RNase;
    reaction_75_TXTL_RNAdeg_F = 10; reaction_75_TXTL_RNAdeg_R = 2000;
  reaction_76: AA_Ribo_RNA_utr1_tetR_RNase => RNase + AA + Ribo; reaction_76_TXTL_RNAdeg_F*AA_Ribo_RNA_utr1_tetR_RNase;
    reaction_76_TXTL_RNAdeg_F = 0.002777778;
  reaction_77: protein_deGFP_contents_19 => protein_deGFP_contents_20; TXTL_PROT_deGFP_MATURATION*protein_deGFP_contents_19;
    TXTL_PROT_deGFP_MATURATION = 0.002310491;
  reaction_78: RNA_utr1_deGFP + Ribo -> Ribo_RNA_utr1_deGFP; reaction_78_TXTL_UTR_UTR1_F*RNA_utr1_deGFP*Ribo - reaction_78_TXTL_UTR_UTR1_R*Ribo_RNA_utr1_deGFP;
    reaction_78_TXTL_UTR_UTR1_F = 0.2; reaction_78_TXTL_UTR_UTR1_R = 4;
  reaction_79: DNA_p28_ptet_utr1_deGFP + RNAP28 -> RNAP28_DNA_p28_ptet_utr1_deGFP; TXTL_PTET_RNAPbound_F*DNA_p28_ptet_utr1_deGFP*RNAP28 - TXTL_PTET_RNAPbound_R*RNAP28_DNA_p28_ptet_utr1_deGFP;
    TXTL_PTET_RNAPbound_F = 0.006; TXTL_PTET_RNAPbound_R = 5;
  reaction_80: DNA_p28_ptet_utr1_deGFP + protein_tetRdimer -> DNA_p28_ptet_utr1_deGFP_protein_tetRdimer; reaction_80_kf*DNA_p28_ptet_utr1_deGFP*protein_tetRdimer - reaction_80_kr*DNA_p28_ptet_utr1_deGFP_protein_tetRdimer;
    reaction_80_kf = 0.00286; reaction_80_kr = 1.1e-5;
  reaction_81: RNAP28_DNA_p28_ptet_utr1_deGFP + protein_tetRdimer -> RNAP28_DNA_p28_ptet_utr1_deGFP_protein_tetRdimer; reaction_81_kf*RNAP28_DNA_p28_ptet_utr1_deGFP*protein_tetRdimer - reaction_81_kr*RNAP28_DNA_p28_ptet_utr1_deGFP_protein_tetRdimer;
    reaction_81_kf = 0.00286; reaction_81_kr = 1.1e-5;
  reaction_82: DNA_p28_ptet_utr1_deGFP_protein_tetRdimer + RNAP28 -> RNAP28_DNA_p28_ptet_utr1_deGFP_protein_tetRdimer; reaction_82_kf*DNA_p28_ptet_utr1_deGFP_protein_tetRdimer*RNAP28 - reaction_82_kr*RNAP28_DNA_p28_ptet_utr1_deGFP_protein_tetRdimer;
    reaction_82_kf = 0.006; reaction_82_kr = 5000;
  reaction_83: Ribo_RNA_utr1_deGFP + AA -> AA_Ribo_RNA_utr1_deGFP; reaction_83_TL_AA_F*Ribo_RNA_utr1_deGFP*AA - reaction_83_TL_AA_R*AA_Ribo_RNA_utr1_deGFP;
    reaction_83_TL_AA_F = 300; reaction_83_TL_AA_R = 0.1;
  reaction_84: AA_Ribo_RNA_utr1_deGFP + 2 AGTP -> AA_2AGTP_Ribo_RNA_utr1_deGFP; reaction_84_TL_AGTP_F*AA_Ribo_RNA_utr1_deGFP*AGTP^2 - reaction_84_TL_AGTP_R*AA_2AGTP_Ribo_RNA_utr1_deGFP;
    reaction_84_TL_AGTP_F = 30; reaction_84_TL_AGTP_R = 10;
  reaction_85: AA_2AGTP_Ribo_RNA_utr1_deGFP => term_Ribo_RNA_utr1_deGFP; reaction_85_TXTL_TL_AA_consumption*AA_2AGTP_Ribo_RNA_utr1_deGFP;
    reaction_85_TXTL_TL_AA_consumption = 0.024;
  reaction_86: AA_2AGTP_Ribo_RNA_utr1_deGFP => term_Ribo_RNA_utr1_deGFP + protein_deGFP_contents_19; reaction_86_TXTL_TL_rate*AA_2AGTP_Ribo_RNA_utr1_deGFP;
    reaction_86_TXTL_TL_rate = 0.012;
  reaction_87: term_Ribo_RNA_utr1_deGFP => RNA_utr1_deGFP + Ribo; reaction_87_TXTL_RIBOBOUND_TERMINATION_RATE*term_Ribo_RNA_utr1_deGFP;
    reaction_87_TXTL_RIBOBOUND_TERMINATION_RATE = 50;
  reaction_88: RNA_utr1_deGFP + RNase -> RNA_utr1_deGFP_RNase; reaction_88_TXTL_RNAdeg_F*RNA_utr1_deGFP*RNase - reaction_88_TXTL_RNAdeg_R*RNA_utr1_deGFP_RNase;
    reaction_88_TXTL_RNAdeg_F = 10; reaction_88_TXTL_RNAdeg_R = 2000;
  reaction_89: RNA_utr1_deGFP_RNase => RNase; reaction_89_TXTL_RNAdeg_F*RNA_utr1_deGFP_RNase;
    reaction_89_TXTL_RNAdeg_F = 0.002777778;
  reaction_90: Ribo_RNA_utr1_deGFP + RNase -> Ribo_RNA_utr1_deGFP_RNase; reaction_90_TXTL_RNAdeg_F*Ribo_RNA_utr1_deGFP*RNase - reaction_90_TXTL_RNAdeg_R*Ribo_RNA_utr1_deGFP_RNase;
    reaction_90_TXTL_RNAdeg_F = 10; reaction_90_TXTL_RNAdeg_R = 2000;
  reaction_91: Ribo_RNA_utr1_deGFP_RNase => RNase + Ribo; reaction_91_TXTL_RNAdeg_F*Ribo_RNA_utr1_deGFP_RNase;
    reaction_91_TXTL_RNAdeg_F = 0.002777778;
  reaction_92: AA_2AGTP_Ribo_RNA_utr1_deGFP + RNase -> AA_2AGTP_Ribo_RNA_utr1_deGFP_RNase; reaction_92_TXTL_RNAdeg_F*AA_2AGTP_Ribo_RNA_utr1_deGFP*RNase - reaction_92_TXTL_RNAdeg_R*AA_2AGTP_Ribo_RNA_utr1_deGFP_RNase;
    reaction_92_TXTL_RNAdeg_F = 10; reaction_92_TXTL_RNAdeg_R = 2000;
  reaction_93: AA_2AGTP_Ribo_RNA_utr1_deGFP_RNase => RNase + AA + 2 AGTP + Ribo; reaction_93_TXTL_RNAdeg_F*AA_2AGTP_Ribo_RNA_utr1_deGFP_RNase;
    reaction_93_TXTL_RNAdeg_F = 0.002777778;
  reaction_94: term_Ribo_RNA_utr1_deGFP + RNase -> term_Ribo_RNA_utr1_deGFP_RNase; reaction_94_TXTL_RNAdeg_F*term_Ribo_RNA_utr1_deGFP*RNase - reaction_94_TXTL_RNAdeg_R*term_Ribo_RNA_utr1_deGFP_RNase;
    reaction_94_TXTL_RNAdeg_F = 10; reaction_94_TXTL_RNAdeg_R = 2000;
  reaction_95: term_Ribo_RNA_utr1_deGFP_RNase => RNase + Ribo; reaction_95_TXTL_RNAdeg_F*term_Ribo_RNA_utr1_deGFP_RNase;
    reaction_95_TXTL_RNAdeg_F = 0.002777778;
  reaction_96: AA_Ribo_RNA_utr1_deGFP + RNase -> AA_Ribo_RNA_utr1_deGFP_RNase; reaction_96_TXTL_RNAdeg_F*AA_Ribo_RNA_utr1_deGFP*RNase - reaction_96_TXTL_RNAdeg_R*AA_Ribo_RNA_utr1_deGFP_RNase;
    reaction_96_TXTL_RNAdeg_F = 10; reaction_96_TXTL_RNAdeg_R = 2000;
  reaction_97: AA_Ribo_RNA_utr1_deGFP_RNase => RNase + AA + Ribo; reaction_97_TXTL_RNAdeg_F*AA_Ribo_RNA_utr1_deGFP_RNase;
    reaction_97_TXTL_RNAdeg_F = 0.002777778;
  reaction_98: AGTP => AGTP_USED; AGTPdeg_F*AGTP;

  // Events:
  event_99: at (time <= 5400): AGTPdeg_F = 0;
  event_100: at (time > 5400): AGTPdeg_F = 0.0002;

  // Unit definitions:
  unit volume = litre;
  unit substance = mole;
  unit area = metre^2;
end
