// SBML level 3 version 1

model combined_model_of__mwed3bf097_6c24_4aff_814a_4781890e4ead_aTc_reservoir_aTc_membrane()
  // model units - substance: substance, time: second, volume: volume, area: area, length: metre, extent: substance

  // Compartments:
  compartment cell1 = 3 volume;
  compartment cell1_external_combined = 1 litre;
  compartment cell1_internal = 1 litre;

  // Species:
  species RNAP in cell1 = 100.0001/cell1;
  species Ribo in cell1 = 30.00002/cell1;
  species RecBCD in cell1 = 5.000003/cell1;
  species RNase in cell1 = 100.0001/cell1;
  species AGTP in cell1 = 3180048/cell1;
  species CUTP in cell1 = 1908029/cell1;
  species AA in cell1 = 3.180048e7/cell1;
  species protein_lacI in cell1 = 0;
  species IPTG in cell1 = 0;
  species protein_lacIdimer in cell1 = 0;
  species protein_lacItetramer in cell1 = 0;
  species RNA_utr1_lacI in cell1 = 0; RNA_utr1_lacI is "RNA utr1--lacI";
  species Ribo_RNA_utr1_lacI in cell1 = 0; Ribo_RNA_utr1_lacI is "Ribo:RNA utr1--lacI";
  species DNA_pOR1OR2_utr1_lacI in cell1 = 20.00001/cell1; DNA_pOR1OR2_utr1_lacI is "DNA pOR1OR2--utr1--lacI";
  species RNAP_DNA_pOR1OR2_utr1_lacI in cell1 = 0; RNAP_DNA_pOR1OR2_utr1_lacI is "RNAP:DNA pOR1OR2--utr1--lacI";
  species CUTP_AGTP_RNAP_DNA_pOR1OR2_utr1_lacI in cell1 = 0; CUTP_AGTP_RNAP_DNA_pOR1OR2_utr1_lacI is "CUTP:AGTP:RNAP:DNA pOR1OR2--utr1--lacI";
  species term_RNAP_DNA_pOR1OR2_utr1_lacI in cell1 = 0; term_RNAP_DNA_pOR1OR2_utr1_lacI is "term_RNAP:DNA pOR1OR2--utr1--lacI";
  species AA_2AGTP_Ribo_RNA_utr1_lacI in cell1 = 0; AA_2AGTP_Ribo_RNA_utr1_lacI is "AA:2AGTP:Ribo:RNA utr1--lacI";
  species term_Ribo_RNA_utr1_lacI in cell1 = 0; term_Ribo_RNA_utr1_lacI is "term_Ribo:RNA utr1--lacI";
  species protein_X174_cell1_23 in cell1 = 0;
  species protein_X174_cell1_24 in cell1 = 0; protein_X174_cell1_24 is "protein X174*";
  species RNA_utr1_X174 in cell1 = 0; RNA_utr1_X174 is "RNA utr1--X174";
  species Ribo_RNA_utr1_X174 in cell1 = 0; Ribo_RNA_utr1_X174 is "Ribo:RNA utr1--X174";
  species DNA_plac_utr1_X174 in cell1 = 20.00001/cell1; DNA_plac_utr1_X174 is "DNA plac--utr1--X174";
  species RNAP_DNA_plac_utr1_X174 in cell1 = 0; RNAP_DNA_plac_utr1_X174 is "RNAP:DNA plac--utr1--X174";
  species CUTP_AGTP_RNAP_DNA_plac_utr1_X174 in cell1 = 0; CUTP_AGTP_RNAP_DNA_plac_utr1_X174 is "CUTP:AGTP:RNAP:DNA plac--utr1--X174";
  species term_RNAP_DNA_plac_utr1_X174 in cell1 = 0; term_RNAP_DNA_plac_utr1_X174 is "term_RNAP:DNA plac--utr1--X174";
  species AA_2AGTP_Ribo_RNA_utr1_X174 in cell1 = 0; AA_2AGTP_Ribo_RNA_utr1_X174 is "AA:2AGTP:Ribo:RNA utr1--X174";
  species term_Ribo_RNA_utr1_X174 in cell1 = 0; term_Ribo_RNA_utr1_X174 is "term_Ribo:RNA utr1--X174";
  species IPTG_protein_lacItetramer in cell1 = 0; IPTG_protein_lacItetramer is "IPTG:protein lacItetramer";
  species AGTP_RNAP_DNA_pOR1OR2_utr1_lacI in cell1 = 0; AGTP_RNAP_DNA_pOR1OR2_utr1_lacI is "AGTP:RNAP:DNA pOR1OR2--utr1--lacI";
  species CUTP_RNAP_DNA_pOR1OR2_utr1_lacI in cell1 = 0; CUTP_RNAP_DNA_pOR1OR2_utr1_lacI is "CUTP:RNAP:DNA pOR1OR2--utr1--lacI";
  species AA_Ribo_RNA_utr1_lacI in cell1 = 0; AA_Ribo_RNA_utr1_lacI is "AA:Ribo:RNA utr1--lacI";
  species RNA_utr1_lacI_RNase in cell1 = 0; RNA_utr1_lacI_RNase is "RNA utr1--lacI:RNase";
  species Ribo_RNA_utr1_lacI_RNase in cell1 = 0; Ribo_RNA_utr1_lacI_RNase is "Ribo:RNA utr1--lacI:RNase";
  species AA_2AGTP_Ribo_RNA_utr1_lacI_RNase in cell1 = 0; AA_2AGTP_Ribo_RNA_utr1_lacI_RNase is "AA:2AGTP:Ribo:RNA utr1--lacI:RNase";
  species term_Ribo_RNA_utr1_lacI_RNase in cell1 = 0; term_Ribo_RNA_utr1_lacI_RNase is "term_Ribo:RNA utr1--lacI:RNase";
  species AA_Ribo_RNA_utr1_lacI_RNase in cell1 = 0; AA_Ribo_RNA_utr1_lacI_RNase is "AA:Ribo:RNA utr1--lacI:RNase";
  species AGTP_RNAP_DNA_plac_utr1_X174 in cell1 = 0; AGTP_RNAP_DNA_plac_utr1_X174 is "AGTP:RNAP:DNA plac--utr1--X174";
  species CUTP_RNAP_DNA_plac_utr1_X174 in cell1 = 0; CUTP_RNAP_DNA_plac_utr1_X174 is "CUTP:RNAP:DNA plac--utr1--X174";
  species DNA_plac_utr1_X174_protein_lacItetramer in cell1 = 0; DNA_plac_utr1_X174_protein_lacItetramer is "DNA plac--utr1--X174:protein lacItetramer";
  species AA_Ribo_RNA_utr1_X174 in cell1 = 0; AA_Ribo_RNA_utr1_X174 is "AA:Ribo:RNA utr1--X174";
  species RNA_utr1_X174_RNase in cell1 = 0; RNA_utr1_X174_RNase is "RNA utr1--X174:RNase";
  species Ribo_RNA_utr1_X174_RNase in cell1 = 0; Ribo_RNA_utr1_X174_RNase is "Ribo:RNA utr1--X174:RNase";
  species AA_2AGTP_Ribo_RNA_utr1_X174_RNase in cell1 = 0; AA_2AGTP_Ribo_RNA_utr1_X174_RNase is "AA:2AGTP:Ribo:RNA utr1--X174:RNase";
  species term_Ribo_RNA_utr1_X174_RNase in cell1 = 0; term_Ribo_RNA_utr1_X174_RNase is "term_Ribo:RNA utr1--X174:RNase";
  species AA_Ribo_RNA_utr1_X174_RNase in cell1 = 0; AA_Ribo_RNA_utr1_X174_RNase is "AA:Ribo:RNA utr1--X174:RNase";
  species AGTP_USED in cell1 = 0;
  species aTc_1 in cell1_internal = 0;
  species xxcomplexL in cell1_internal = 0; xxcomplexL is "complexL*";
  species xxaTc_complexL in cell1_internal = 0; xxaTc_complexL is "aTc:complexL*";
  species aTc_2_combined in cell1_external_combined = 0;

  // Parameters:
  AGTPdeg_F = 0;
  kb = 2 per_second;
  kd = 1 per_second;

  // Reactions:
  reaction_59: protein_lacItetramer + IPTG -> IPTG_protein_lacItetramer; TXTL_INDUCER_LacI_IPTG_F*protein_lacItetramer*IPTG - TXTL_INDUCER_LacI_IPTG_R*IPTG_protein_lacItetramer;
    TXTL_INDUCER_LacI_IPTG_F = 0.1; TXTL_INDUCER_LacI_IPTG_R = 0.01;
  reaction_60: 2 protein_lacI -> protein_lacIdimer; kf*protein_lacI^2 - kr*protein_lacIdimer;
    kf = 1.1; kr = 1;
  reaction_61: 2 protein_lacIdimer -> protein_lacItetramer; TXTL_PROT_TETRAMER_proteinlacI_F*protein_lacIdimer^2 - TXTL_PROT_TETRAMER_proteinlacI_R*protein_lacItetramer;
    TXTL_PROT_TETRAMER_proteinlacI_F = 2; TXTL_PROT_TETRAMER_proteinlacI_R = 250;
  reaction_62: RNA_utr1_lacI + Ribo -> Ribo_RNA_utr1_lacI; reaction_62_TXTL_UTR_UTR1_F*RNA_utr1_lacI*Ribo - reaction_62_TXTL_UTR_UTR1_R*Ribo_RNA_utr1_lacI;
    reaction_62_TXTL_UTR_UTR1_F = 0.2; reaction_62_TXTL_UTR_UTR1_R = 4;
  reaction_63: DNA_pOR1OR2_utr1_lacI + RNAP -> RNAP_DNA_pOR1OR2_utr1_lacI; TXTL_POR1OR2_RNAPbound_F*DNA_pOR1OR2_utr1_lacI*RNAP - TXTL_POR1OR2_RNAPbound_R*RNAP_DNA_pOR1OR2_utr1_lacI;
    TXTL_POR1OR2_RNAPbound_F = 20; TXTL_POR1OR2_RNAPbound_R = 400;
  reaction_64: CUTP_AGTP_RNAP_DNA_pOR1OR2_utr1_lacI => RNAP_DNA_pOR1OR2_utr1_lacI; reaction_64_TXTL_NTP_consumption*CUTP_AGTP_RNAP_DNA_pOR1OR2_utr1_lacI;
    reaction_64_TXTL_NTP_consumption = 0.7487705;
  reaction_65: term_RNAP_DNA_pOR1OR2_utr1_lacI => RNAP + DNA_pOR1OR2_utr1_lacI; reaction_65_TXTL_RNAPBOUND_TERMINATION_RATE*term_RNAP_DNA_pOR1OR2_utr1_lacI;
    reaction_65_TXTL_RNAPBOUND_TERMINATION_RATE = 0.05;
  reaction_66: RNAP_DNA_pOR1OR2_utr1_lacI + AGTP -> AGTP_RNAP_DNA_pOR1OR2_utr1_lacI; reaction_66_TXTL_NTP_RNAP_F*RNAP_DNA_pOR1OR2_utr1_lacI*AGTP - reaction_66_TXTL_NTP_RNAP_R*AGTP_RNAP_DNA_pOR1OR2_utr1_lacI;
    reaction_66_TXTL_NTP_RNAP_F = 1000; reaction_66_TXTL_NTP_RNAP_R = 120000000;
  reaction_67: RNAP_DNA_pOR1OR2_utr1_lacI + CUTP -> CUTP_RNAP_DNA_pOR1OR2_utr1_lacI; reaction_67_TXTL_NTP_RNAP_F*RNAP_DNA_pOR1OR2_utr1_lacI*CUTP - reaction_67_TXTL_NTP_RNAP_R*CUTP_RNAP_DNA_pOR1OR2_utr1_lacI;
    reaction_67_TXTL_NTP_RNAP_F = 1000; reaction_67_TXTL_NTP_RNAP_R = 120000000;
  reaction_68: AGTP_RNAP_DNA_pOR1OR2_utr1_lacI + CUTP -> CUTP_AGTP_RNAP_DNA_pOR1OR2_utr1_lacI; reaction_68_TXTL_NTP_RNAP_F*AGTP_RNAP_DNA_pOR1OR2_utr1_lacI*CUTP - reaction_68_TXTL_NTP_RNAP_R*CUTP_AGTP_RNAP_DNA_pOR1OR2_utr1_lacI;
    reaction_68_TXTL_NTP_RNAP_F = 1; reaction_68_TXTL_NTP_RNAP_R = 120000;
  reaction_69: CUTP_RNAP_DNA_pOR1OR2_utr1_lacI + AGTP -> CUTP_AGTP_RNAP_DNA_pOR1OR2_utr1_lacI; reaction_69_TXTL_NTP_RNAP_F*CUTP_RNAP_DNA_pOR1OR2_utr1_lacI*AGTP - reaction_69_TXTL_NTP_RNAP_R*CUTP_AGTP_RNAP_DNA_pOR1OR2_utr1_lacI;
    reaction_69_TXTL_NTP_RNAP_F = 1; reaction_69_TXTL_NTP_RNAP_R = 120000;
  reaction_70: CUTP_AGTP_RNAP_DNA_pOR1OR2_utr1_lacI => term_RNAP_DNA_pOR1OR2_utr1_lacI + RNA_utr1_lacI; reaction_70_TXTL_transcription_rate1*CUTP_AGTP_RNAP_DNA_pOR1OR2_utr1_lacI;
    reaction_70_TXTL_transcription_rate1 = 0.001229508;
  reaction_71: Ribo_RNA_utr1_lacI + AA -> AA_Ribo_RNA_utr1_lacI; reaction_71_TL_AA_F*Ribo_RNA_utr1_lacI*AA - reaction_71_TL_AA_R*AA_Ribo_RNA_utr1_lacI;
    reaction_71_TL_AA_F = 300; reaction_71_TL_AA_R = 0.1;
  reaction_72: AA_Ribo_RNA_utr1_lacI + 2 AGTP -> AA_2AGTP_Ribo_RNA_utr1_lacI; reaction_72_TL_AGTP_F*AA_Ribo_RNA_utr1_lacI*AGTP^2 - reaction_72_TL_AGTP_R*AA_2AGTP_Ribo_RNA_utr1_lacI;
    reaction_72_TL_AGTP_F = 30; reaction_72_TL_AGTP_R = 10;
  reaction_73: AA_2AGTP_Ribo_RNA_utr1_lacI => term_Ribo_RNA_utr1_lacI; reaction_73_TXTL_TL_AA_consumption*AA_2AGTP_Ribo_RNA_utr1_lacI;
    reaction_73_TXTL_TL_AA_consumption = 0.03;
  reaction_74: AA_2AGTP_Ribo_RNA_utr1_lacI => term_Ribo_RNA_utr1_lacI + protein_lacI; reaction_74_TXTL_TL_rate*AA_2AGTP_Ribo_RNA_utr1_lacI;
    reaction_74_TXTL_TL_rate = 0.01;
  reaction_75: term_Ribo_RNA_utr1_lacI => RNA_utr1_lacI + Ribo; reaction_75_TXTL_RIBOBOUND_TERMINATION_RATE*term_Ribo_RNA_utr1_lacI;
    reaction_75_TXTL_RIBOBOUND_TERMINATION_RATE = 50;
  reaction_76: RNA_utr1_lacI + RNase -> RNA_utr1_lacI_RNase; reaction_76_TXTL_RNAdeg_F*RNA_utr1_lacI*RNase - reaction_76_TXTL_RNAdeg_R*RNA_utr1_lacI_RNase;
    reaction_76_TXTL_RNAdeg_F = 10; reaction_76_TXTL_RNAdeg_R = 2000;
  reaction_77: RNA_utr1_lacI_RNase => RNase; reaction_77_TXTL_RNAdeg_F*RNA_utr1_lacI_RNase;
    reaction_77_TXTL_RNAdeg_F = 0.002777778;
  reaction_78: Ribo_RNA_utr1_lacI + RNase -> Ribo_RNA_utr1_lacI_RNase; reaction_78_TXTL_RNAdeg_F*Ribo_RNA_utr1_lacI*RNase - reaction_78_TXTL_RNAdeg_R*Ribo_RNA_utr1_lacI_RNase;
    reaction_78_TXTL_RNAdeg_F = 10; reaction_78_TXTL_RNAdeg_R = 2000;
  reaction_79: Ribo_RNA_utr1_lacI_RNase => RNase + Ribo; reaction_79_TXTL_RNAdeg_F*Ribo_RNA_utr1_lacI_RNase;
    reaction_79_TXTL_RNAdeg_F = 0.002777778;
  reaction_80: AA_2AGTP_Ribo_RNA_utr1_lacI + RNase -> AA_2AGTP_Ribo_RNA_utr1_lacI_RNase; reaction_80_TXTL_RNAdeg_F*AA_2AGTP_Ribo_RNA_utr1_lacI*RNase - reaction_80_TXTL_RNAdeg_R*AA_2AGTP_Ribo_RNA_utr1_lacI_RNase;
    reaction_80_TXTL_RNAdeg_F = 10; reaction_80_TXTL_RNAdeg_R = 2000;
  reaction_81: AA_2AGTP_Ribo_RNA_utr1_lacI_RNase => RNase + AA + 2 AGTP + Ribo; reaction_81_TXTL_RNAdeg_F*AA_2AGTP_Ribo_RNA_utr1_lacI_RNase;
    reaction_81_TXTL_RNAdeg_F = 0.002777778;
  reaction_82: term_Ribo_RNA_utr1_lacI + RNase -> term_Ribo_RNA_utr1_lacI_RNase; reaction_82_TXTL_RNAdeg_F*term_Ribo_RNA_utr1_lacI*RNase - reaction_82_TXTL_RNAdeg_R*term_Ribo_RNA_utr1_lacI_RNase;
    reaction_82_TXTL_RNAdeg_F = 10; reaction_82_TXTL_RNAdeg_R = 2000;
  reaction_83: term_Ribo_RNA_utr1_lacI_RNase => RNase + Ribo; reaction_83_TXTL_RNAdeg_F*term_Ribo_RNA_utr1_lacI_RNase;
    reaction_83_TXTL_RNAdeg_F = 0.002777778;
  reaction_84: AA_Ribo_RNA_utr1_lacI + RNase -> AA_Ribo_RNA_utr1_lacI_RNase; reaction_84_TXTL_RNAdeg_F*AA_Ribo_RNA_utr1_lacI*RNase - reaction_84_TXTL_RNAdeg_R*AA_Ribo_RNA_utr1_lacI_RNase;
    reaction_84_TXTL_RNAdeg_F = 10; reaction_84_TXTL_RNAdeg_R = 2000;
  reaction_85: AA_Ribo_RNA_utr1_lacI_RNase => RNase + AA + Ribo; reaction_85_TXTL_RNAdeg_F*AA_Ribo_RNA_utr1_lacI_RNase;
    reaction_85_TXTL_RNAdeg_F = 0.002777778;
  reaction_86: protein_X174_cell1_23 => protein_X174_cell1_24; TXTL_PROT_X174_MATURATION*protein_X174_cell1_23;
    TXTL_PROT_X174_MATURATION = 0.002310491;
  reaction_87: RNA_utr1_X174 + Ribo -> Ribo_RNA_utr1_X174; reaction_87_TXTL_UTR_UTR1_F*RNA_utr1_X174*Ribo - reaction_87_TXTL_UTR_UTR1_R*Ribo_RNA_utr1_X174;
    reaction_87_TXTL_UTR_UTR1_F = 0.2; reaction_87_TXTL_UTR_UTR1_R = 4;
  reaction_88: DNA_plac_utr1_X174 + RNAP -> RNAP_DNA_plac_utr1_X174; TXTL_PLAC_RNAPbound_F*DNA_plac_utr1_X174*RNAP - TXTL_PLAC_RNAPbound_R*RNAP_DNA_plac_utr1_X174;
    TXTL_PLAC_RNAPbound_F = 20; TXTL_PLAC_RNAPbound_R = 400;
  reaction_89: CUTP_AGTP_RNAP_DNA_plac_utr1_X174 => RNAP_DNA_plac_utr1_X174; reaction_89_TXTL_NTP_consumption*CUTP_AGTP_RNAP_DNA_plac_utr1_X174;
    reaction_89_TXTL_NTP_consumption = 0.7485294;
  reaction_90: term_RNAP_DNA_plac_utr1_X174 => RNAP + DNA_plac_utr1_X174; reaction_90_TXTL_RNAPBOUND_TERMINATION_RATE*term_RNAP_DNA_plac_utr1_X174;
    reaction_90_TXTL_RNAPBOUND_TERMINATION_RATE = 0.05;
  reaction_91: RNAP_DNA_plac_utr1_X174 + AGTP -> AGTP_RNAP_DNA_plac_utr1_X174; reaction_91_TXTL_NTP_RNAP_F*RNAP_DNA_plac_utr1_X174*AGTP - reaction_91_TXTL_NTP_RNAP_R*AGTP_RNAP_DNA_plac_utr1_X174;
    reaction_91_TXTL_NTP_RNAP_F = 1000; reaction_91_TXTL_NTP_RNAP_R = 120000000;
  reaction_92: RNAP_DNA_plac_utr1_X174 + CUTP -> CUTP_RNAP_DNA_plac_utr1_X174; reaction_92_TXTL_NTP_RNAP_F*RNAP_DNA_plac_utr1_X174*CUTP - reaction_92_TXTL_NTP_RNAP_R*CUTP_RNAP_DNA_plac_utr1_X174;
    reaction_92_TXTL_NTP_RNAP_F = 1000; reaction_92_TXTL_NTP_RNAP_R = 120000000;
  reaction_93: AGTP_RNAP_DNA_plac_utr1_X174 + CUTP -> CUTP_AGTP_RNAP_DNA_plac_utr1_X174; reaction_93_TXTL_NTP_RNAP_F*AGTP_RNAP_DNA_plac_utr1_X174*CUTP - reaction_93_TXTL_NTP_RNAP_R*CUTP_AGTP_RNAP_DNA_plac_utr1_X174;
    reaction_93_TXTL_NTP_RNAP_F = 1; reaction_93_TXTL_NTP_RNAP_R = 120000;
  reaction_94: CUTP_RNAP_DNA_plac_utr1_X174 + AGTP -> CUTP_AGTP_RNAP_DNA_plac_utr1_X174; reaction_94_TXTL_NTP_RNAP_F*CUTP_RNAP_DNA_plac_utr1_X174*AGTP - reaction_94_TXTL_NTP_RNAP_R*CUTP_AGTP_RNAP_DNA_plac_utr1_X174;
    reaction_94_TXTL_NTP_RNAP_F = 1; reaction_94_TXTL_NTP_RNAP_R = 120000;
  reaction_95: CUTP_AGTP_RNAP_DNA_plac_utr1_X174 => term_RNAP_DNA_plac_utr1_X174 + RNA_utr1_X174; reaction_95_TXTL_transcription_rate1*CUTP_AGTP_RNAP_DNA_plac_utr1_X174;
    reaction_95_TXTL_transcription_rate1 = 0.001470588;
  reaction_96: DNA_plac_utr1_X174 + protein_lacItetramer -> DNA_plac_utr1_X174_protein_lacItetramer; placI_sequestration_F*DNA_plac_utr1_X174*protein_lacItetramer - placI_sequestration_R*DNA_plac_utr1_X174_protein_lacItetramer;
    placI_sequestration_F = 150; placI_sequestration_R = 0.1;
  reaction_97: Ribo_RNA_utr1_X174 + AA -> AA_Ribo_RNA_utr1_X174; reaction_97_TL_AA_F*Ribo_RNA_utr1_X174*AA - reaction_97_TL_AA_R*AA_Ribo_RNA_utr1_X174;
    reaction_97_TL_AA_F = 300; reaction_97_TL_AA_R = 0.1;
  reaction_98: AA_Ribo_RNA_utr1_X174 + 2 AGTP -> AA_2AGTP_Ribo_RNA_utr1_X174; reaction_98_TL_AGTP_F*AA_Ribo_RNA_utr1_X174*AGTP^2 - reaction_98_TL_AGTP_R*AA_2AGTP_Ribo_RNA_utr1_X174;
    reaction_98_TL_AGTP_F = 30; reaction_98_TL_AGTP_R = 10;
  reaction_99: AA_2AGTP_Ribo_RNA_utr1_X174 => term_Ribo_RNA_utr1_X174; reaction_99_TXTL_TL_AA_consumption*AA_2AGTP_Ribo_RNA_utr1_X174;
    reaction_99_TXTL_TL_AA_consumption = 0.024;
  reaction_100: AA_2AGTP_Ribo_RNA_utr1_X174 => term_Ribo_RNA_utr1_X174 + protein_X174_cell1_23; reaction_100_TXTL_TL_rate*AA_2AGTP_Ribo_RNA_utr1_X174;
    reaction_100_TXTL_TL_rate = 0.012;
  reaction_101: term_Ribo_RNA_utr1_X174 => RNA_utr1_X174 + Ribo; reaction_101_TXTL_RIBOBOUND_TERMINATION_RATE*term_Ribo_RNA_utr1_X174;
    reaction_101_TXTL_RIBOBOUND_TERMINATION_RATE = 50;
  reaction_102: RNA_utr1_X174 + RNase -> RNA_utr1_X174_RNase; reaction_102_TXTL_RNAdeg_F*RNA_utr1_X174*RNase - reaction_102_TXTL_RNAdeg_R*RNA_utr1_X174_RNase;
    reaction_102_TXTL_RNAdeg_F = 10; reaction_102_TXTL_RNAdeg_R = 2000;
  reaction_103: RNA_utr1_X174_RNase => RNase; reaction_103_TXTL_RNAdeg_F*RNA_utr1_X174_RNase;
    reaction_103_TXTL_RNAdeg_F = 0.002777778;
  reaction_104: Ribo_RNA_utr1_X174 + RNase -> Ribo_RNA_utr1_X174_RNase; reaction_104_TXTL_RNAdeg_F*Ribo_RNA_utr1_X174*RNase - reaction_104_TXTL_RNAdeg_R*Ribo_RNA_utr1_X174_RNase;
    reaction_104_TXTL_RNAdeg_F = 10; reaction_104_TXTL_RNAdeg_R = 2000;
  reaction_105: Ribo_RNA_utr1_X174_RNase => RNase + Ribo; reaction_105_TXTL_RNAdeg_F*Ribo_RNA_utr1_X174_RNase;
    reaction_105_TXTL_RNAdeg_F = 0.002777778;
  reaction_106: AA_2AGTP_Ribo_RNA_utr1_X174 + RNase -> AA_2AGTP_Ribo_RNA_utr1_X174_RNase; reaction_106_TXTL_RNAdeg_F*AA_2AGTP_Ribo_RNA_utr1_X174*RNase - reaction_106_TXTL_RNAdeg_R*AA_2AGTP_Ribo_RNA_utr1_X174_RNase;
    reaction_106_TXTL_RNAdeg_F = 10; reaction_106_TXTL_RNAdeg_R = 2000;
  reaction_107: AA_2AGTP_Ribo_RNA_utr1_X174_RNase => RNase + AA + 2 AGTP + Ribo; reaction_107_TXTL_RNAdeg_F*AA_2AGTP_Ribo_RNA_utr1_X174_RNase;
    reaction_107_TXTL_RNAdeg_F = 0.002777778;
  reaction_108: term_Ribo_RNA_utr1_X174 + RNase -> term_Ribo_RNA_utr1_X174_RNase; reaction_108_TXTL_RNAdeg_F*term_Ribo_RNA_utr1_X174*RNase - reaction_108_TXTL_RNAdeg_R*term_Ribo_RNA_utr1_X174_RNase;
    reaction_108_TXTL_RNAdeg_F = 10; reaction_108_TXTL_RNAdeg_R = 2000;
  reaction_109: term_Ribo_RNA_utr1_X174_RNase => RNase + Ribo; reaction_109_TXTL_RNAdeg_F*term_Ribo_RNA_utr1_X174_RNase;
    reaction_109_TXTL_RNAdeg_F = 0.002777778;
  reaction_110: AA_Ribo_RNA_utr1_X174 + RNase -> AA_Ribo_RNA_utr1_X174_RNase; reaction_110_TXTL_RNAdeg_F*AA_Ribo_RNA_utr1_X174*RNase - reaction_110_TXTL_RNAdeg_R*AA_Ribo_RNA_utr1_X174_RNase;
    reaction_110_TXTL_RNAdeg_F = 10; reaction_110_TXTL_RNAdeg_R = 2000;
  reaction_111: AA_Ribo_RNA_utr1_X174_RNase => RNase + AA + Ribo; reaction_111_TXTL_RNAdeg_F*AA_Ribo_RNA_utr1_X174_RNase;
    reaction_111_TXTL_RNAdeg_F = 0.002777778;
  reaction_112: AGTP => AGTP_USED; AGTPdeg_F*AGTP;

  // Events:
  event_113: at (time <= 5400): AGTPdeg_F = 0;
  event_114: at (time > 5400): AGTPdeg_F = 0.0002;

  // Unit definitions:
  unit volume = litre;
  unit substance = mole;
  unit area = metre^2;
  unit per_second = 1 / second;
end
