// SBML level 3 version 1

model aTc_membrane()
  // model units - substance: substance, time: second, extent: mole

  // Compartments:
  compartment internal = 1 litre;
  compartment external = 1 litre;

  // Species:
  species aTc in external = 0;
  species aTc_1 in internal = 0;
  species xxcomplexL in internal = 0; xxcomplexL is "complexL*";
  species xxaTc_complexL in internal = 0; xxaTc_complexL is "aTc:complexL*";

  // Parameters:
  kb = 2 per_second;
  kd = 1 per_second;

  // Reactions:
  r1: aTc + xxcomplexL -> xxaTc_complexL; kb*aTc*xxcomplexL - kd*xxaTc_complexL;
  r2: xxaTc_complexL -> aTc_1 + xxcomplexL; kd*xxaTc_complexL - kb*aTc_1*xxcomplexL;

  // Unit definitions:
  unit per_second = 1 / second;
  unit substance = dimensionless;
end
