// SBML level 3 version 1

model combined_model_of__s1_S1_s2_S2()
  // model units - substance: substance, time: time, volume: volume, area: area, length: length, extent: substance

  // Compartments:
  compartment cell_combined = 2 volume;

  // Species:
  species D_S1 in cell_combined = 1;
  species F_S1 in cell_combined = 1;
  species E_S1_1_combined in cell_combined = 1;

  // Reactions:
  r1_S1: D_S1 + E_S1_1_combined => F_S1; cell_combined*k1*D_S1*E_S1_1_combined;
    k1 = 0.1;

  // Unit definitions:
  unit length = metre;
  unit area = metre^2;
  unit volume = 1e-3 litre;
  unit time = second;
  unit substance = 1e-3 mole;
end
