// SBML level 2 version 4

model mix_of_E30VNPRL_E30VNPRL_gene_expression()
  // mix_of_E30VNPRL_E30VNPRL_gene_expression

  // Compartments:
  compartment contents = 1;

  // Species:
  species RNAP in contents = 100.0001/contents;
  species Ribo in contents = 30.00002/contents;
  species RecBCD in contents = 5.000003/contents;
  species RNase in contents = 100.0001/contents;
  species AGTP in contents = 3180048/contents;
  species CUTP in contents = 1908029/contents;
  species AA in contents = 3.180048e7/contents;
  species protein_lacI in contents = 0;
  species IPTG in contents = 0;
  species protein_lacIdimer in contents = 0;
  species protein_lacItetramer in contents = 0;
  species RNA_utr1_lacI in contents = 0; RNA_utr1_lacI is "RNA utr1--lacI";
  species Ribo_RNA_utr1_lacI in contents = 0; Ribo_RNA_utr1_lacI is "Ribo:RNA utr1--lacI";
  species DNA_pOR1OR2_utr1_lacI in contents = 20.00001/contents; DNA_pOR1OR2_utr1_lacI is "DNA pOR1OR2--utr1--lacI";
  species RNAP_DNA_pOR1OR2_utr1_lacI in contents = 0; RNAP_DNA_pOR1OR2_utr1_lacI is "RNAP:DNA pOR1OR2--utr1--lacI";
  species CUTP_AGTP_RNAP_DNA_pOR1OR2_utr1_lacI in contents = 0; CUTP_AGTP_RNAP_DNA_pOR1OR2_utr1_lacI is "CUTP:AGTP:RNAP:DNA pOR1OR2--utr1--lacI";
  species term_RNAP_DNA_pOR1OR2_utr1_lacI in contents = 0; term_RNAP_DNA_pOR1OR2_utr1_lacI is "term_RNAP:DNA pOR1OR2--utr1--lacI";
  species AA_2AGTP_Ribo_RNA_utr1_lacI in contents = 0; AA_2AGTP_Ribo_RNA_utr1_lacI is "AA:2AGTP:Ribo:RNA utr1--lacI";
  species term_Ribo_RNA_utr1_lacI in contents = 0; term_Ribo_RNA_utr1_lacI is "term_Ribo:RNA utr1--lacI";
  species protein_X174_contents_21 in contents = 0;
  species protein_X174_contents_22 in contents = 0; protein_X174_contents_22 is "protein X174*";
  species RNA_utr1_X174 in contents = 0; RNA_utr1_X174 is "RNA utr1--X174";
  species Ribo_RNA_utr1_X174 in contents = 0; Ribo_RNA_utr1_X174 is "Ribo:RNA utr1--X174";
  species DNA_plac_utr1_X174 in contents = 20.00001/contents; DNA_plac_utr1_X174 is "DNA plac--utr1--X174";
  species RNAP_DNA_plac_utr1_X174 in contents = 0; RNAP_DNA_plac_utr1_X174 is "RNAP:DNA plac--utr1--X174";
  species CUTP_AGTP_RNAP_DNA_plac_utr1_X174 in contents = 0; CUTP_AGTP_RNAP_DNA_plac_utr1_X174 is "CUTP:AGTP:RNAP:DNA plac--utr1--X174";
  species term_RNAP_DNA_plac_utr1_X174 in contents = 0; term_RNAP_DNA_plac_utr1_X174 is "term_RNAP:DNA plac--utr1--X174";
  species AA_2AGTP_Ribo_RNA_utr1_X174 in contents = 0; AA_2AGTP_Ribo_RNA_utr1_X174 is "AA:2AGTP:Ribo:RNA utr1--X174";
  species term_Ribo_RNA_utr1_X174 in contents = 0; term_Ribo_RNA_utr1_X174 is "term_Ribo:RNA utr1--X174";
  species IPTG_protein_lacItetramer in contents = 0; IPTG_protein_lacItetramer is "IPTG:protein lacItetramer";
  species AGTP_RNAP_DNA_pOR1OR2_utr1_lacI in contents = 0; AGTP_RNAP_DNA_pOR1OR2_utr1_lacI is "AGTP:RNAP:DNA pOR1OR2--utr1--lacI";
  species CUTP_RNAP_DNA_pOR1OR2_utr1_lacI in contents = 0; CUTP_RNAP_DNA_pOR1OR2_utr1_lacI is "CUTP:RNAP:DNA pOR1OR2--utr1--lacI";
  species AA_Ribo_RNA_utr1_lacI in contents = 0; AA_Ribo_RNA_utr1_lacI is "AA:Ribo:RNA utr1--lacI";
  species RNA_utr1_lacI_RNase in contents = 0; RNA_utr1_lacI_RNase is "RNA utr1--lacI:RNase";
  species Ribo_RNA_utr1_lacI_RNase in contents = 0; Ribo_RNA_utr1_lacI_RNase is "Ribo:RNA utr1--lacI:RNase";
  species AA_2AGTP_Ribo_RNA_utr1_lacI_RNase in contents = 0; AA_2AGTP_Ribo_RNA_utr1_lacI_RNase is "AA:2AGTP:Ribo:RNA utr1--lacI:RNase";
  species term_Ribo_RNA_utr1_lacI_RNase in contents = 0; term_Ribo_RNA_utr1_lacI_RNase is "term_Ribo:RNA utr1--lacI:RNase";
  species AA_Ribo_RNA_utr1_lacI_RNase in contents = 0; AA_Ribo_RNA_utr1_lacI_RNase is "AA:Ribo:RNA utr1--lacI:RNase";
  species AGTP_RNAP_DNA_plac_utr1_X174 in contents = 0; AGTP_RNAP_DNA_plac_utr1_X174 is "AGTP:RNAP:DNA plac--utr1--X174";
  species CUTP_RNAP_DNA_plac_utr1_X174 in contents = 0; CUTP_RNAP_DNA_plac_utr1_X174 is "CUTP:RNAP:DNA plac--utr1--X174";
  species DNA_plac_utr1_X174_protein_lacItetramer in contents = 0; DNA_plac_utr1_X174_protein_lacItetramer is "DNA plac--utr1--X174:protein lacItetramer";
  species AA_Ribo_RNA_utr1_X174 in contents = 0; AA_Ribo_RNA_utr1_X174 is "AA:Ribo:RNA utr1--X174";
  species RNA_utr1_X174_RNase in contents = 0; RNA_utr1_X174_RNase is "RNA utr1--X174:RNase";
  species Ribo_RNA_utr1_X174_RNase in contents = 0; Ribo_RNA_utr1_X174_RNase is "Ribo:RNA utr1--X174:RNase";
  species AA_2AGTP_Ribo_RNA_utr1_X174_RNase in contents = 0; AA_2AGTP_Ribo_RNA_utr1_X174_RNase is "AA:2AGTP:Ribo:RNA utr1--X174:RNase";
  species term_Ribo_RNA_utr1_X174_RNase in contents = 0; term_Ribo_RNA_utr1_X174_RNase is "term_Ribo:RNA utr1--X174:RNase";
  species AA_Ribo_RNA_utr1_X174_RNase in contents = 0; AA_Ribo_RNA_utr1_X174_RNase is "AA:Ribo:RNA utr1--X174:RNase";
  species AGTP_USED in contents = 0;

  // Parameters:
  AGTPdeg_F = 0;

  // Reactions:
  reaction_51: protein_lacItetramer + IPTG -> IPTG_protein_lacItetramer; TXTL_INDUCER_LacI_IPTG_F*protein_lacItetramer*IPTG - TXTL_INDUCER_LacI_IPTG_R*IPTG_protein_lacItetramer;
    TXTL_INDUCER_LacI_IPTG_F = 0.1; TXTL_INDUCER_LacI_IPTG_R = 0.01;
  reaction_52: 2 protein_lacI -> protein_lacIdimer; kf*protein_lacI^2 - kr*protein_lacIdimer;
    kf = 1.1; kr = 1;
  reaction_53: 2 protein_lacIdimer -> protein_lacItetramer; TXTL_PROT_TETRAMER_proteinlacI_F*protein_lacIdimer^2 - TXTL_PROT_TETRAMER_proteinlacI_R*protein_lacItetramer;
    TXTL_PROT_TETRAMER_proteinlacI_F = 2; TXTL_PROT_TETRAMER_proteinlacI_R = 250;
  reaction_54: RNA_utr1_lacI + Ribo -> Ribo_RNA_utr1_lacI; reaction_54_TXTL_UTR_UTR1_F*RNA_utr1_lacI*Ribo - reaction_54_TXTL_UTR_UTR1_R*Ribo_RNA_utr1_lacI;
    reaction_54_TXTL_UTR_UTR1_F = 0.2; reaction_54_TXTL_UTR_UTR1_R = 4;
  reaction_55: DNA_pOR1OR2_utr1_lacI + RNAP -> RNAP_DNA_pOR1OR2_utr1_lacI; TXTL_POR1OR2_RNAPbound_F*DNA_pOR1OR2_utr1_lacI*RNAP - TXTL_POR1OR2_RNAPbound_R*RNAP_DNA_pOR1OR2_utr1_lacI;
    TXTL_POR1OR2_RNAPbound_F = 20; TXTL_POR1OR2_RNAPbound_R = 400;
  reaction_56: CUTP_AGTP_RNAP_DNA_pOR1OR2_utr1_lacI => RNAP_DNA_pOR1OR2_utr1_lacI; reaction_56_TXTL_NTP_consumption*CUTP_AGTP_RNAP_DNA_pOR1OR2_utr1_lacI;
    reaction_56_TXTL_NTP_consumption = 0.7487705;
  reaction_57: term_RNAP_DNA_pOR1OR2_utr1_lacI => RNAP + DNA_pOR1OR2_utr1_lacI; reaction_57_TXTL_RNAPBOUND_TERMINATION_RATE*term_RNAP_DNA_pOR1OR2_utr1_lacI;
    reaction_57_TXTL_RNAPBOUND_TERMINATION_RATE = 0.05;
  reaction_58: RNAP_DNA_pOR1OR2_utr1_lacI + AGTP -> AGTP_RNAP_DNA_pOR1OR2_utr1_lacI; reaction_58_TXTL_NTP_RNAP_F*RNAP_DNA_pOR1OR2_utr1_lacI*AGTP - reaction_58_TXTL_NTP_RNAP_R*AGTP_RNAP_DNA_pOR1OR2_utr1_lacI;
    reaction_58_TXTL_NTP_RNAP_F = 1000; reaction_58_TXTL_NTP_RNAP_R = 120000000;
  reaction_59: RNAP_DNA_pOR1OR2_utr1_lacI + CUTP -> CUTP_RNAP_DNA_pOR1OR2_utr1_lacI; reaction_59_TXTL_NTP_RNAP_F*RNAP_DNA_pOR1OR2_utr1_lacI*CUTP - reaction_59_TXTL_NTP_RNAP_R*CUTP_RNAP_DNA_pOR1OR2_utr1_lacI;
    reaction_59_TXTL_NTP_RNAP_F = 1000; reaction_59_TXTL_NTP_RNAP_R = 120000000;
  reaction_60: AGTP_RNAP_DNA_pOR1OR2_utr1_lacI + CUTP -> CUTP_AGTP_RNAP_DNA_pOR1OR2_utr1_lacI; reaction_60_TXTL_NTP_RNAP_F*AGTP_RNAP_DNA_pOR1OR2_utr1_lacI*CUTP - reaction_60_TXTL_NTP_RNAP_R*CUTP_AGTP_RNAP_DNA_pOR1OR2_utr1_lacI;
    reaction_60_TXTL_NTP_RNAP_F = 1; reaction_60_TXTL_NTP_RNAP_R = 120000;
  reaction_61: CUTP_RNAP_DNA_pOR1OR2_utr1_lacI + AGTP -> CUTP_AGTP_RNAP_DNA_pOR1OR2_utr1_lacI; reaction_61_TXTL_NTP_RNAP_F*CUTP_RNAP_DNA_pOR1OR2_utr1_lacI*AGTP - reaction_61_TXTL_NTP_RNAP_R*CUTP_AGTP_RNAP_DNA_pOR1OR2_utr1_lacI;
    reaction_61_TXTL_NTP_RNAP_F = 1; reaction_61_TXTL_NTP_RNAP_R = 120000;
  reaction_62: CUTP_AGTP_RNAP_DNA_pOR1OR2_utr1_lacI => term_RNAP_DNA_pOR1OR2_utr1_lacI + RNA_utr1_lacI; reaction_62_TXTL_transcription_rate1*CUTP_AGTP_RNAP_DNA_pOR1OR2_utr1_lacI;
    reaction_62_TXTL_transcription_rate1 = 0.001229508;
  reaction_63: Ribo_RNA_utr1_lacI + AA -> AA_Ribo_RNA_utr1_lacI; reaction_63_TL_AA_F*Ribo_RNA_utr1_lacI*AA - reaction_63_TL_AA_R*AA_Ribo_RNA_utr1_lacI;
    reaction_63_TL_AA_F = 300; reaction_63_TL_AA_R = 0.1;
  reaction_64: AA_Ribo_RNA_utr1_lacI + 2 AGTP -> AA_2AGTP_Ribo_RNA_utr1_lacI; reaction_64_TL_AGTP_F*AA_Ribo_RNA_utr1_lacI*AGTP^2 - reaction_64_TL_AGTP_R*AA_2AGTP_Ribo_RNA_utr1_lacI;
    reaction_64_TL_AGTP_F = 30; reaction_64_TL_AGTP_R = 10;
  reaction_65: AA_2AGTP_Ribo_RNA_utr1_lacI => term_Ribo_RNA_utr1_lacI; reaction_65_TXTL_TL_AA_consumption*AA_2AGTP_Ribo_RNA_utr1_lacI;
    reaction_65_TXTL_TL_AA_consumption = 0.03;
  reaction_66: AA_2AGTP_Ribo_RNA_utr1_lacI => term_Ribo_RNA_utr1_lacI + protein_lacI; reaction_66_TXTL_TL_rate*AA_2AGTP_Ribo_RNA_utr1_lacI;
    reaction_66_TXTL_TL_rate = 0.01;
  reaction_67: term_Ribo_RNA_utr1_lacI => RNA_utr1_lacI + Ribo; reaction_67_TXTL_RIBOBOUND_TERMINATION_RATE*term_Ribo_RNA_utr1_lacI;
    reaction_67_TXTL_RIBOBOUND_TERMINATION_RATE = 50;
  reaction_68: RNA_utr1_lacI + RNase -> RNA_utr1_lacI_RNase; reaction_68_TXTL_RNAdeg_F*RNA_utr1_lacI*RNase - reaction_68_TXTL_RNAdeg_R*RNA_utr1_lacI_RNase;
    reaction_68_TXTL_RNAdeg_F = 10; reaction_68_TXTL_RNAdeg_R = 2000;
  reaction_69: RNA_utr1_lacI_RNase => RNase; reaction_69_TXTL_RNAdeg_F*RNA_utr1_lacI_RNase;
    reaction_69_TXTL_RNAdeg_F = 0.002777778;
  reaction_70: Ribo_RNA_utr1_lacI + RNase -> Ribo_RNA_utr1_lacI_RNase; reaction_70_TXTL_RNAdeg_F*Ribo_RNA_utr1_lacI*RNase - reaction_70_TXTL_RNAdeg_R*Ribo_RNA_utr1_lacI_RNase;
    reaction_70_TXTL_RNAdeg_F = 10; reaction_70_TXTL_RNAdeg_R = 2000;
  reaction_71: Ribo_RNA_utr1_lacI_RNase => RNase + Ribo; reaction_71_TXTL_RNAdeg_F*Ribo_RNA_utr1_lacI_RNase;
    reaction_71_TXTL_RNAdeg_F = 0.002777778;
  reaction_72: AA_2AGTP_Ribo_RNA_utr1_lacI + RNase -> AA_2AGTP_Ribo_RNA_utr1_lacI_RNase; reaction_72_TXTL_RNAdeg_F*AA_2AGTP_Ribo_RNA_utr1_lacI*RNase - reaction_72_TXTL_RNAdeg_R*AA_2AGTP_Ribo_RNA_utr1_lacI_RNase;
    reaction_72_TXTL_RNAdeg_F = 10; reaction_72_TXTL_RNAdeg_R = 2000;
  reaction_73: AA_2AGTP_Ribo_RNA_utr1_lacI_RNase => RNase + AA + 2 AGTP + Ribo; reaction_73_TXTL_RNAdeg_F*AA_2AGTP_Ribo_RNA_utr1_lacI_RNase;
    reaction_73_TXTL_RNAdeg_F = 0.002777778;
  reaction_74: term_Ribo_RNA_utr1_lacI + RNase -> term_Ribo_RNA_utr1_lacI_RNase; reaction_74_TXTL_RNAdeg_F*term_Ribo_RNA_utr1_lacI*RNase - reaction_74_TXTL_RNAdeg_R*term_Ribo_RNA_utr1_lacI_RNase;
    reaction_74_TXTL_RNAdeg_F = 10; reaction_74_TXTL_RNAdeg_R = 2000;
  reaction_75: term_Ribo_RNA_utr1_lacI_RNase => RNase + Ribo; reaction_75_TXTL_RNAdeg_F*term_Ribo_RNA_utr1_lacI_RNase;
    reaction_75_TXTL_RNAdeg_F = 0.002777778;
  reaction_76: AA_Ribo_RNA_utr1_lacI + RNase -> AA_Ribo_RNA_utr1_lacI_RNase; reaction_76_TXTL_RNAdeg_F*AA_Ribo_RNA_utr1_lacI*RNase - reaction_76_TXTL_RNAdeg_R*AA_Ribo_RNA_utr1_lacI_RNase;
    reaction_76_TXTL_RNAdeg_F = 10; reaction_76_TXTL_RNAdeg_R = 2000;
  reaction_77: AA_Ribo_RNA_utr1_lacI_RNase => RNase + AA + Ribo; reaction_77_TXTL_RNAdeg_F*AA_Ribo_RNA_utr1_lacI_RNase;
    reaction_77_TXTL_RNAdeg_F = 0.002777778;
  reaction_78: protein_X174_contents_21 => protein_X174_contents_22; TXTL_PROT_X174_MATURATION*protein_X174_contents_21;
    TXTL_PROT_X174_MATURATION = 0.002310491;
  reaction_79: RNA_utr1_X174 + Ribo -> Ribo_RNA_utr1_X174; reaction_79_TXTL_UTR_UTR1_F*RNA_utr1_X174*Ribo - reaction_79_TXTL_UTR_UTR1_R*Ribo_RNA_utr1_X174;
    reaction_79_TXTL_UTR_UTR1_F = 0.2; reaction_79_TXTL_UTR_UTR1_R = 4;
  reaction_80: DNA_plac_utr1_X174 + RNAP -> RNAP_DNA_plac_utr1_X174; TXTL_PLAC_RNAPbound_F*DNA_plac_utr1_X174*RNAP - TXTL_PLAC_RNAPbound_R*RNAP_DNA_plac_utr1_X174;
    TXTL_PLAC_RNAPbound_F = 20; TXTL_PLAC_RNAPbound_R = 400;
  reaction_81: CUTP_AGTP_RNAP_DNA_plac_utr1_X174 => RNAP_DNA_plac_utr1_X174; reaction_81_TXTL_NTP_consumption*CUTP_AGTP_RNAP_DNA_plac_utr1_X174;
    reaction_81_TXTL_NTP_consumption = 0.7485294;
  reaction_82: term_RNAP_DNA_plac_utr1_X174 => RNAP + DNA_plac_utr1_X174; reaction_82_TXTL_RNAPBOUND_TERMINATION_RATE*term_RNAP_DNA_plac_utr1_X174;
    reaction_82_TXTL_RNAPBOUND_TERMINATION_RATE = 0.05;
  reaction_83: RNAP_DNA_plac_utr1_X174 + AGTP -> AGTP_RNAP_DNA_plac_utr1_X174; reaction_83_TXTL_NTP_RNAP_F*RNAP_DNA_plac_utr1_X174*AGTP - reaction_83_TXTL_NTP_RNAP_R*AGTP_RNAP_DNA_plac_utr1_X174;
    reaction_83_TXTL_NTP_RNAP_F = 1000; reaction_83_TXTL_NTP_RNAP_R = 120000000;
  reaction_84: RNAP_DNA_plac_utr1_X174 + CUTP -> CUTP_RNAP_DNA_plac_utr1_X174; reaction_84_TXTL_NTP_RNAP_F*RNAP_DNA_plac_utr1_X174*CUTP - reaction_84_TXTL_NTP_RNAP_R*CUTP_RNAP_DNA_plac_utr1_X174;
    reaction_84_TXTL_NTP_RNAP_F = 1000; reaction_84_TXTL_NTP_RNAP_R = 120000000;
  reaction_85: AGTP_RNAP_DNA_plac_utr1_X174 + CUTP -> CUTP_AGTP_RNAP_DNA_plac_utr1_X174; reaction_85_TXTL_NTP_RNAP_F*AGTP_RNAP_DNA_plac_utr1_X174*CUTP - reaction_85_TXTL_NTP_RNAP_R*CUTP_AGTP_RNAP_DNA_plac_utr1_X174;
    reaction_85_TXTL_NTP_RNAP_F = 1; reaction_85_TXTL_NTP_RNAP_R = 120000;
  reaction_86: CUTP_RNAP_DNA_plac_utr1_X174 + AGTP -> CUTP_AGTP_RNAP_DNA_plac_utr1_X174; reaction_86_TXTL_NTP_RNAP_F*CUTP_RNAP_DNA_plac_utr1_X174*AGTP - reaction_86_TXTL_NTP_RNAP_R*CUTP_AGTP_RNAP_DNA_plac_utr1_X174;
    reaction_86_TXTL_NTP_RNAP_F = 1; reaction_86_TXTL_NTP_RNAP_R = 120000;
  reaction_87: CUTP_AGTP_RNAP_DNA_plac_utr1_X174 => term_RNAP_DNA_plac_utr1_X174 + RNA_utr1_X174; reaction_87_TXTL_transcription_rate1*CUTP_AGTP_RNAP_DNA_plac_utr1_X174;
    reaction_87_TXTL_transcription_rate1 = 0.001470588;
  reaction_88: DNA_plac_utr1_X174 + protein_lacItetramer -> DNA_plac_utr1_X174_protein_lacItetramer; placI_sequestration_F*DNA_plac_utr1_X174*protein_lacItetramer - placI_sequestration_R*DNA_plac_utr1_X174_protein_lacItetramer;
    placI_sequestration_F = 150; placI_sequestration_R = 0.1;
  reaction_89: Ribo_RNA_utr1_X174 + AA -> AA_Ribo_RNA_utr1_X174; reaction_89_TL_AA_F*Ribo_RNA_utr1_X174*AA - reaction_89_TL_AA_R*AA_Ribo_RNA_utr1_X174;
    reaction_89_TL_AA_F = 300; reaction_89_TL_AA_R = 0.1;
  reaction_90: AA_Ribo_RNA_utr1_X174 + 2 AGTP -> AA_2AGTP_Ribo_RNA_utr1_X174; reaction_90_TL_AGTP_F*AA_Ribo_RNA_utr1_X174*AGTP^2 - reaction_90_TL_AGTP_R*AA_2AGTP_Ribo_RNA_utr1_X174;
    reaction_90_TL_AGTP_F = 30; reaction_90_TL_AGTP_R = 10;
  reaction_91: AA_2AGTP_Ribo_RNA_utr1_X174 => term_Ribo_RNA_utr1_X174; reaction_91_TXTL_TL_AA_consumption*AA_2AGTP_Ribo_RNA_utr1_X174;
    reaction_91_TXTL_TL_AA_consumption = 0.024;
  reaction_92: AA_2AGTP_Ribo_RNA_utr1_X174 => term_Ribo_RNA_utr1_X174 + protein_X174_contents_21; reaction_92_TXTL_TL_rate*AA_2AGTP_Ribo_RNA_utr1_X174;
    reaction_92_TXTL_TL_rate = 0.012;
  reaction_93: term_Ribo_RNA_utr1_X174 => RNA_utr1_X174 + Ribo; reaction_93_TXTL_RIBOBOUND_TERMINATION_RATE*term_Ribo_RNA_utr1_X174;
    reaction_93_TXTL_RIBOBOUND_TERMINATION_RATE = 50;
  reaction_94: RNA_utr1_X174 + RNase -> RNA_utr1_X174_RNase; reaction_94_TXTL_RNAdeg_F*RNA_utr1_X174*RNase - reaction_94_TXTL_RNAdeg_R*RNA_utr1_X174_RNase;
    reaction_94_TXTL_RNAdeg_F = 10; reaction_94_TXTL_RNAdeg_R = 2000;
  reaction_95: RNA_utr1_X174_RNase => RNase; reaction_95_TXTL_RNAdeg_F*RNA_utr1_X174_RNase;
    reaction_95_TXTL_RNAdeg_F = 0.002777778;
  reaction_96: Ribo_RNA_utr1_X174 + RNase -> Ribo_RNA_utr1_X174_RNase; reaction_96_TXTL_RNAdeg_F*Ribo_RNA_utr1_X174*RNase - reaction_96_TXTL_RNAdeg_R*Ribo_RNA_utr1_X174_RNase;
    reaction_96_TXTL_RNAdeg_F = 10; reaction_96_TXTL_RNAdeg_R = 2000;
  reaction_97: Ribo_RNA_utr1_X174_RNase => RNase + Ribo; reaction_97_TXTL_RNAdeg_F*Ribo_RNA_utr1_X174_RNase;
    reaction_97_TXTL_RNAdeg_F = 0.002777778;
  reaction_98: AA_2AGTP_Ribo_RNA_utr1_X174 + RNase -> AA_2AGTP_Ribo_RNA_utr1_X174_RNase; reaction_98_TXTL_RNAdeg_F*AA_2AGTP_Ribo_RNA_utr1_X174*RNase - reaction_98_TXTL_RNAdeg_R*AA_2AGTP_Ribo_RNA_utr1_X174_RNase;
    reaction_98_TXTL_RNAdeg_F = 10; reaction_98_TXTL_RNAdeg_R = 2000;
  reaction_99: AA_2AGTP_Ribo_RNA_utr1_X174_RNase => RNase + AA + 2 AGTP + Ribo; reaction_99_TXTL_RNAdeg_F*AA_2AGTP_Ribo_RNA_utr1_X174_RNase;
    reaction_99_TXTL_RNAdeg_F = 0.002777778;
  reaction_100: term_Ribo_RNA_utr1_X174 + RNase -> term_Ribo_RNA_utr1_X174_RNase; reaction_100_TXTL_RNAdeg_F*term_Ribo_RNA_utr1_X174*RNase - reaction_100_TXTL_RNAdeg_R*term_Ribo_RNA_utr1_X174_RNase;
    reaction_100_TXTL_RNAdeg_F = 10; reaction_100_TXTL_RNAdeg_R = 2000;
  reaction_101: term_Ribo_RNA_utr1_X174_RNase => RNase + Ribo; reaction_101_TXTL_RNAdeg_F*term_Ribo_RNA_utr1_X174_RNase;
    reaction_101_TXTL_RNAdeg_F = 0.002777778;
  reaction_102: AA_Ribo_RNA_utr1_X174 + RNase -> AA_Ribo_RNA_utr1_X174_RNase; reaction_102_TXTL_RNAdeg_F*AA_Ribo_RNA_utr1_X174*RNase - reaction_102_TXTL_RNAdeg_R*AA_Ribo_RNA_utr1_X174_RNase;
    reaction_102_TXTL_RNAdeg_F = 10; reaction_102_TXTL_RNAdeg_R = 2000;
  reaction_103: AA_Ribo_RNA_utr1_X174_RNase => RNase + AA + Ribo; reaction_103_TXTL_RNAdeg_F*AA_Ribo_RNA_utr1_X174_RNase;
    reaction_103_TXTL_RNAdeg_F = 0.002777778;
  reaction_104: AGTP => AGTP_USED; AGTPdeg_F*AGTP;

  // Events:
  event_105: at (time <= 5400): AGTPdeg_F = 0;
  event_106: at (time > 5400): AGTPdeg_F = 0.0002;
end
